im_45 := READ_IMAGE("D:\test_im\1.bmp")
# Добавление рамки 255, чтобы исключить деление на ноль
rounder_im(im) :=
    j ← 0
    i ← 0
    x ← rows(im)
    y ← cols(im)
    for j ∈ -1 .. y
        for i ∈ -1 .. x
            im_o[i + 1, j + 1] ← 255 if (j == -1) or (j == y) or (i == -1) or (i == x)
            im_o[i + 1, j + 1] ← im[i, j] otherwise
    im_o
im_10 := READ_IMAGE("D:\test_im\101.bmp")
im_25 := READ_IMAGE("D:\test_im\25.bmp")
im_35 := READ_IMAGE("D:\test_im\35.bmp")
# Загружаем изображения
im_r_10 := READ_IMAGE("D:\test_im\test.bmp")
im_r_25 := READ_IMAGE("D:\test_im\25_45.bmp")
im_r_35 := READ_IMAGE("D:\test_im\35_45.bmp")
# растояние до объекта
h := 2.8
im_r_45 := READ_IMAGE("D:\test_im\45_45.bmp")
b := 18  # угловое поле
can_10 := rounder_im(255*binarize(im_10, 128))  # Применяем оператор  и домножаем
can_25 := rounder_im(255*binarize(im_25, 128))
rotation_interest := 0.3  # Коэффициент учета всех точек экстремумов
can_35 := rounder_im(255*binarize(im_35, 128))
summ_coeff := 0.01  # коэффициент скорости наростания суммы точек
can_45 := rounder_im(255*binarize(im_45, 128))
can_r_10 := rounder_im(255*binarize(im_r_10, 70))
coeff_por := 2  # Коэффициент количества порядков
# Угол диагонали к Х
can_r_25 := rounder_im(255*binarize(im_r_25, 128))
can_r_35 := rounder_im(255*binarize(im_r_35, 128))
# диагональ
ac := 2*h*tan(b/2*deg)
can_r_45 := rounder_im(255*binarize(im_r_45, 128))
s := can_r_25
x := cols(s) = 1602
y := rows(s) = 902
# Длина пикселя
alpha := 180*atan(x/y)/π
pix_leng := ac*sin(alpha*deg)/rows(s)
# Эти функции находят крайние точки
pix_leng = 0.000856836
alpha = 60.6185
find_max_y(image) :=
    i ← 0
    j ← 0
    x ← rows(image) - 1
    y ← cols(image) - 1
    for i ∈ 0 .. y
        for j ∈ 0 .. x
            if image[j, i] < 200
                max_y[0, 0] ← i
                max_y[0, 1] ← j
                break
    max_y
find_min_y(image) :=
    i ← 0
    j ← 0
    x ← rows(image) - 1
    y ← cols(image) - 1
    for i ∈ y .. 0
        for j ∈ 0 .. x
            if image[j, i] < 200
                min_y[0, 0] ← i
                min_y[0, 1] ← j
                break
    min_y
find_max_x(image) :=
    i ← 0
    j ← 0
    x ← rows(image) - 1
    y ← cols(image) - 1
    for i ∈ x .. 0
        for j ∈ 0 .. y
            if image[i, j] < 200
                max_x[0, 0] ← j
                max_x[0, 1] ← i
                break
    max_x
find_min_x(image) :=
    i ← 0
    j ← 0
    x ← rows(image) - 1
    y ← cols(image) - 1
    for i ∈ 0 .. x
        for j ∈ 0 .. y
            if image[i, j] < 200
                min_x[0, 0] ← j
                min_x[0, 1] ← i
                break
    min_x
find_dots(im) :=
    max_y ← find_max_y(im)
    min_y ← find_min_y(im)
    max_x ← find_max_x(im)
    min_x ← find_min_x(im)
    dots[0, 0] ← max_y[0, 0]
    dots[0, 1] ← max_y[0, 1]
    dots[1, 0] ← min_y[0, 0]
    dots[1, 1] ← min_y[0, 1]
    dots[2, 0] ← max_x[0, 0]
    dots[2, 1] ← max_x[0, 1]
    dots[3, 0] ← min_x[0, 0]
    dots[3, 1] ← min_x[0, 1]
    dots  # Находим все точки и сводим их в один массив
# первый показатель - у,
# вотрой показатель - х
# Правильная функция для округления
mantissa(x) := x - floor(x)
roundoff(x) :=
    r ← ceil(x) if mantissa(x) > 0.5
    r ← floor(x) otherwise
    r  # Функция для нахождения длины отрезка
# Поиск координат точек центров
find_one_line(x1, y1, x2, y2) :=
    r ← sqrt((x1 - x2)^2 + (y1 - y2)^2)
    r
find_coeff_str(x1, y1, x2, y2) :=
    a ← y1 - y2
    b ← x2 - x1
    c ← x1*y2 - x2*y1
    if b ≠ 0
        coeff[0] ← -1*a/b
        coeff[1] ← -1*c/b
    otherwise
        coeff[0] ← -1
        coeff[1] ← -1
    coeff
# Скрипт для нахождения длин диагоналей
find_diag_lines(dot) :=
    center[0, 1] ← roundoff((dot[0, 1] + dot[3, 1])/2)
    center[0, 0] ← roundoff((dot[0, 0] + dot[3, 0])/2)
    center[1, 1] ← roundoff((dot[1, 1] + dot[2, 1])/2)
    center[1, 0] ← roundoff((dot[1, 0] + dot[2, 0])/2)
    center
# l dots
# 0.0 - y1, 1.0 - y2, 1.1 - x2, 0.1 - x1
find_lines(dot) :=
    line[0, 0] ← find_one_line(dot[0, 1], dot[0, 0], dot[1, 1], dot[1, 0])
    line[0, 1] ← find_one_line(dot[2, 1], dot[2, 0], dot[3, 1], dot[3, 0])
    line[0, 2] ← line[0, 0]/line[0, 1] if line[0, 1] ≠ 0
    line[0, 2] ← line[0, 0] otherwise
    line
# Находим точки, диагонали и угол
diag_len(img) :=
    dot ← find_dots(img)
    diag[0, 0] ← 0
    cntr ← 0
    diag[2, 0] ← 0
    diag[3, 0] ← 0
    line ← find_lines(dot)
    diag[0, 0] ← line[0, 0] if line[0, 2] > 1 + rotation_interest
    diag[0, 0] ← line[0, 1] if line[0, 2] < 1 - rotation_interest
    if diag[0, 0] == 0
        cntr ← find_diag_lines(dot)
        diag[0, 0] ← find_one_line(cntr[0, 0], cntr[0, 1], cntr[1, 0], cntr[1, 1])
        diag[1] ← find_coeff_str(cntr[0, 0], cntr[0, 1], cntr[1, 0], cntr[1, 1])
        diag[0, 1] ← |cntr[0, 1] - cntr[1, 1]|
        diag[0, 2] ← |cntr[1, 0] - cntr[0, 0]|
        diag[2, 0] ← 1
        diag[3, 0] ← 1
        diag[4, 0] ← 180*atan(diag[0, 1]/diag[0, 2])/π if diag[0, 2] ≠ 0
        diag[4, 0] ← 90 otherwise
    diag
# diag
# 0.0 - диагонали длина
# 0,1 - длина проекции на у
# 0,2 - длина проекции на х
# 0,3 - угол поворота в град
# 0.4 - кол-во точек(0 = 2, 1 = 4)
# 1,0 - коэфф. прямой
# проверка прост | Ищем длину в глубину
r := find_dots(can_r_45)
find_z_len(summ, diag) :=
    prev ← summ[0, 0] + 1
    count ← 0
    i ← 0
    s ← 0
    i_max ← 0
    i_min ← 0
    max_summ ← 0
    min_summ ← 64000
    for i ∈ 1 .. rows(summ) - 1
        if ((prev/(summ[i, 0] + 1) < (1 + summ_coeff)) and (prev/(summ[i, 0] + 1) > (1 - summ_coeff)))
            prev ← summ[i, 0] + 1
            count ← count + 1
        otherwise
            count ← 0
            prev ← summ[i, 0] + 1
        if (count > coeff_por)
            if summ[i, 0] > max_summ
                max_summ ← summ[i, 0]
                i_min ← summ[i, 1]
                j_min ← summ[i, 2]
            if summ[i, 0] < min_summ
                min_summ ← summ[i, 0]
                j_max ← summ[i, 2]
                i_max ← summ[i, 1]
        s ← s + 1
    out[0, 0] ← |max_summ|
    out[0, 1] ← |min_summ|
    out[0, 2] ← |max_summ - min_summ|
    out[0, 3] ← s
    i_min_up ← i_min - roundoff(out[0, 0]/2)
    i_max_up ← i_max - roundoff(out[0, 1]/2)
    if diag[3, 0] == 0
        out[0, 4] ← find_one_line(i_max_up, j_max, i_min_up, j_min)
        y ← |i_min_up - i_max_up|
        x ← |j_min - j_max|
        out[0, 5] ← 180*atan(y/x)/π if x ≠ 0
        out[0, 5] ← 90 otherwise
        out[0, 6] ← find_coeff_str(j_max, i_max_up, j_min, i_min_up)
    otherwise
        out[0, 4] ← diag[0, 0]
        out[0, 5] ← diag[4, 0]
        out[0, 6] ← diag[1, 0]
    out
s11 := find_diag_lines(r)
r = [884, 703; 250, 888; 842, 641; 273, 900]
s11 = [578, 801; 546, 764]
# Вращаем картинку пи считаем
rotate_and_summ(img, diag) :=
    rotated ← rotate(invert(img), diag[4, 0]) if diag[3, 0] ≠ 0
    otherwise
        i ← 0
        j ← 0
        bol1 ← 0
        bol2 ← 0
        img1 ← invert(img)
        x ← rows(img1) - 2
        y ← cols(img1) - 2
        for i ∈ 1 .. y
            for j ∈ 1 .. x
                if (img1[j, i - 1] > 120) and (is_it == 1)
                    founded ← 1
                    if img1[j, i] < 120
                        is_it ← 0
                        bol1 ← bol1 + counter
            counter ← counter + 1
            is_it ← 1
        img1 ← rotate(img1, 90)
        x ← rows(img1) - 2
        y ← cols(img1) - 2
        for i ∈ 1 .. y
            for j ∈ 1 .. x
                if (img1[j, i - 1] > 120) and (is_it == 1)
                    founded ← 1
                    if img1[j, i + 1] < 120
                        is_it ← 0
                        bol2 ← bol2 + counter
            counter ← counter + 1
            is_it ← 1
        rotated ← invert(img) if (bol1 > bol2)
        rotated ← rotate(invert(img), 90) otherwise
    num_mass ← 0
    i ← 0
    j ← 0
    x ← rows(rotated) - 1
    y ← cols(rotated) - 1
    for i ∈ 1 .. y
        for j ∈ 0 .. x
            if (rotated[j, i] > 120) and (is_it == 1)
                counter ← counter + 1
                founded ← 1
                if rotated[j + 1, i] < 120
                    is_it ← 0
                    counter ← counter + 1
                    summ[num_mass, 0] ← counter
                    summ[num_mass, 1] ← j
                    summ[num_mass, 2] ← i
                    num_mass ← num_mass + 1
        counter ← 0
        is_it ← 1
    summ
x2 ← roundoff((rows(img) - 2)/2)
y2 ← roundoff((cols(img) - 2)/2)
for i ∈ 0 .. x
    if (img[i, y2] > 120)
        counter ← counter + 1
        founded ← 1
        if img[i + 1, y2] < 120
            is_it ← 0
            counter ← counter + 1
            summ1[num_mass, 0] ← counter
            summ1[num_mass, 1] ← j
            summ1[num_mass, 2] ← i
            num_mass ← num_mass + 1
diag[1] ← find_coeff_str(dot[2, 1], dot[2, 0], dot[3, 1], dot[3, 0])
diag[0, 2] ← |dot[2, 0] - dot[3, 0]|
diag[0, 1] ← |dot[2, 1] - dot[3, 1]|
for j ∈ 0 .. y
    if (img[x2, j] > 120)
        counter ← counter + 1
        founded ← 1
        if img[x2, j + 1] < 120
            is_it ← 0
            counter ← counter + 1
            summ1[num_mass, 0] ← counter
            summ1[num_mass, 1] ← j
            summ1[num_mass, 2] ← i
diag[0, 3] ← 180*atan(diag[0, 1]/diag[0, 2])/π if diag[0, 2] ≠ 0
diag[0, 3] ← 90 otherwise
□, j_min
max_min[0, 0] := 0
max_min[0, 1] := 0
test_m := diag_len(s)
test_m = [957.228, 731, 618; [1.18285; -669.977], 0, 0; 1, 0, 0; 1, 0, 0; 49.7882, 0, 0]
find_fin(x, y) :=
    res[0, 0] ← sqrt(y[0, 4]^2 + y[0, 2]^2)
    res[0, 1] ← 180*atan(y[0, 2]/y[0, 4])/π if y[0, 4] ≠ 0
    res[0, 1] ← res[0, 1]/0.081301 if x[2, 0] == 0
    res[0, 1] ← res[0, 1]/0.04375 if x[2, 0] ≠ 0
    res[0, 2] ← y[0, 4]/cos(res[0, 1]*deg)
    res[0, 3] ← y[0, 4]*tan(res[0, 1]*deg)
    res[0, 4] ← y[0, 5]
    res[0, 5] ← res[0, 2]*pix_leng
    res[1, 0] ← y[0, 6]
    res
s =  # no stored result
g := 0 .. 1250
pixels_im := rotate_and_summ(s, test_m)
WRITEBMP("D:\test_im\can_test3.bmp") := pixels_im
pixels_im =  # no stored result
max_min := find_z_len(pixels_im, test_m)
# Добавить обработку ошибок
# деления на ноль
max_min = [83, 67, 16, 967, 957.228, 49.7882, [1.18285; -669.977]]
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result := find_fin(test_m, max_min)
# 1 - длина проекции
# 2 - угол поворота в невидимую область
# 3 -  вычисленная длина объекта
# 4 - длина объекта "в глубину"
# 5 - угол поворота в плоскости наблюдения
# 6 - длина обекта в метрах
# (7;8) - коэфф К и Х в уравнении прямой
result = [957.361, 21.8881, 1031.59, 384.573, 49.7882, 0.883905; [1.18285; -669.977], 0, 0, 0, 0, 0]
b := 0 .. 3  # угловые коэффициенты
v := [0.0537, 0.03985, 0.03592, 0.0457]
v1 := [0.110, 0.0756, 0.0676, 0.0723]
v1/2 = [0.055, 0.0378, 0.0338, 0.03615]  # не работает тангенс изза крайних точек объекта
v := v + 10
v = [10.0537, 10.0398, 10.0359, 10.0457]
# отрисовка в файл найденной линии
paint_line(img, r) :=
    i ← 0
    j ← 0
    x ← rows(img) - 1
    y ← cols(img) - 1
    for j ∈ 0 .. y
        for i ∈ 0 .. x
            img_out[i, j] ← 155 if i == roundoff(r[1, 0][0]*j) + roundoff(r[1, 0][1])
            img_out[i, j] ← img[i, j] otherwise
    img_out
rot := paint_line(s, result)
WRITEBMP("D:\test_im\can_test3.bmp") := rot
